units real
atom_style full
bond_style harmonic
angle_style harmonic
dihedral_style harmonic
pair_style lj/cut/coul/long 12
kspace_style pppm 1e-5
special_bonds lj 0.0 0.0 0.5 coul 0.0 0.0 1.0 angle yes

region box block -15 15 -15 15 -15 15
create_box 9 box &
bond/types 6 &
angle/types 15 &
dihedral/types 3 &
extra/bond/per/atom 2 &
extra/angle/per/atom 1 &
extra/special/per/atom 2

include PARM_1.lammps


molecule h2omol water/water_data_file/FlexibleH2O.txt
create_atoms 0 random 350 45615 NULL mol &
    h2omol 14756 overlap 1 maxtry 50

group H2O type 8 9
minimize 1.0e-4 1.0e-6 100 1000
reset_timestep 0

fix mynpt all npt temp 300 300 100 iso 1 1 1000

dump mydmp all atom 1000 dump.lammpstrj
variable mytemp equal temp
variable myvol equal vol
fix myat1 all ave/time 10 10 100 v_mytemp file temperature.dat
fix myat2 all ave/time 10 10 100 v_myvol file volume.dat
variable myoxy equal count(H2O)/3
variable mydensity equal ${myoxy}/v_myvol
fix myat3 all ave/time 10 10 100 v_mydensity file density.dat
thermo 1000


timestep 1.0
run 50000

replicate 3 1 1

write_data H2O.data
